deg_rad := π/180
rad_deg := 1/deg_rad float → 57.2957795131
A := [-0.234993437964; 0.400444385082; 0.885676226716]
B := [-0.502869355028; -0.864362430797; 0]
α := acos(A*B) → 1.80077636104
acos((a*b)/(|a|*|b|))*6371 float → 6371.0*acos(a*b/(|a|*|b|))
N := 3
|a - b|*6371 float → 6371.0*|b - 1.0*a|
rad_step := α/N*rad_deg → 34.3922951115
